pi1 := 0.2
pi2 := 0.8
p2100 := 0.1
p1011 := 0.1
pxx11 := 0.1
p1001 := 0.1
px101 := 0.1
p1100 := 0.1
px100 := 0.1
p2111 := 0.1
p2101 := 0.1
px111 := 0.1
p1101 := 0.1
p1111 := 0.1
p2001 := 0.1
p1x11 := 0.1
Given
p1001 == p2100*(1 - pi1) + p2101*(1 - pi1)*(1 - pi2)
p1100 == p2100*pi1 + p2101*(pi1*(1 - pi2)) + p2001*(1 - pi2)
px100 == p1100*pi1 + p1101*(pi1*(1 - pi2)) + px101*(pi1*(1 - pi2))
p2101 == p1001*pi2 + p1100*(1 - pi1) + px101*(1 - pi1)*(1 - pi2) + p1101*(1 - pi1)*(1 - pi2) + p1011*(1 - pi2)
p1101 == p2111*pi1*(1 - pi2) + p2101*pi1*pi2
p1011 == p2111*(1 - pi1)*pi2 + p2101*(1 - pi1)*pi2
px101 == p1101*pi1*pi2 + p1111*pi1*(1 - pi2) + px111*pi1*(1 - pi2) + px101*pi1*pi2
p1x11 == p2111*(1 - pi1)*pi2
px111 == p1111*pi1*pi2 + px111*pi1*pi2
p1111 == p2111*pi1*pi2
p2100 == p1001*(1 - pi2)
p2111 == px111*(1 - pi1)*(1 - pi2) + p1011*(1 - pi1)*pi2 + p1101*(1 - pi1)*pi2 + px101*(1 - pi1)*pi2 + p1x11*(1 - pi2) + p1111*(1 - pi1)*(1 - pi2) + pxx11*(1 - pi1)*(1 - pi2)
1 == p2100 + p1001 + p1100 + px100 + p2101 + p1101 + p1011 + px101 + p2111 + px111 + p1111 + p1x11 + pxx11
summ := Find(p2100, p1001, p1100, px100, p2101, p1101, p1011, px101, p2111, px111, p1111, p1x11, pxx11)
sum(summ) = 1
pxx11 == px111*(1 - pi1)*pi2 + p1111*(1 - pi1)*pi2 + p1x11*pi2
as + as2 =  # error: Эта переменная не определена.
